<neuroml xmlns="http://www.neuroml.org/schema/neuroml2"  xmlns:xs="http://www.w3.org/2001/XMLSchema" xmlns:xsi="http://www.w3.org/2001/XMLSchema-instance" xsi:schemaLocation="http://www.neuroml.org/schema/neuroml2 https://raw.github.com/NeuroML/NeuroML2/development/Schemas/NeuroML2/NeuroML_v2beta5.xsd" id="Example7_Brunel2000">
    <notes>Generated network</notes>
    <pulseGenerator id="iclamp0" delay="100.0ms" duration="800.0ms" amplitude="0.99nA"/>
    <IF_cond_alpha id="ifcell" cm="1." i_offset="0.1" tau_syn_E="2." tau_syn_I="10." v_init="-65." tau_m="20." tau_refrac="5." v_reset="-65." v_rest="-65." v_thresh="-50." e_rev_E="-10." e_rev_I="-80."/>
    <alphaCondSynapse id="ampa" tau_syn="2." e_rev="-10."/>
    <alphaCondSynapse id="gaba" tau_syn="10." e_rev="-80."/>
    <network id="Example7_Brunel2000">
        <notes>Example 7: based on network of Brunel 2000</notes>
        <population id="E" component="ifcell" size="80"/>
        <population id="I" component="ifcell" size="20"/>
        <projection id="projEe" presynapticPopulation="E" postsynapticPopulation="E" synapse="ampa">
            <connectionWD id="0" preCellId="../E[0]" postCellId="../E[1]" weight="0.02" delay="2.0ms"/>
            <connectionWD id="1" preCellId="../E[0]" postCellId="../E[2]" weight="0.02" delay="2.0ms"/>
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        </projection>
        <projection id="projEI" presynapticPopulation="E" postsynapticPopulation="I" synapse="ampa">
            <connectionWD id="0" preCellId="../E[0]" postCellId="../I[1]" weight="0.02" delay="2.0ms"/>
            <connectionWD id="1" preCellId="../E[0]" postCellId="../I[2]" weight="0.02" delay="2.0ms"/>
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        </projection>
        <projection id="projIE" presynapticPopulation="I" postsynapticPopulation="E" synapse="gaba">
            <connectionWD id="0" preCellId="../I[0]" postCellId="../E[1]" weight="0.02" delay="2.0ms"/>
            <connectionWD id="1" preCellId="../I[0]" postCellId="../E[6]" weight="0.02" delay="2.0ms"/>
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        </projection>
        <inputList id="stim" population="E" component="iclamp0">
            <input id="0" target="../E[1]" destination="synapses"/>
            <input id="1" target="../E[2]" destination="synapses"/>
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        </inputList>
    </network>
</neuroml>
